# linterp(vx, vy, x) Returns a linearly interpolated value at x for data vectors vx and vy.
VV := READPRN("percentiles.csv")
vx := VV[:, ORIGIN]
vy := VV[:, ORIGIN + 3]
thalweg := VV[:, ORIGIN + 1]
# 1:100 AEP = ORIGIN + 2
# 1:200 AEP = ORIGIN + 3
x := [1; 1687; 3510; 5153; 6759; 8037; 9841; 10709; 11440; 12152; 12807; 13475; 14148; 14797; 15734; 16802; 17986; 18922; 19928; 21161; 22319; 23664; 24813; 26042; 27192; 28223]
y := linterp(vx, vy, x) = [128.067; 127.925; 127.422; 127.418; 127.418; 127.404; 127.404; 127.349; 127.349; 127.236; 126.656; 126.028; 125.898; 125.871; 125.84; 125.693; 125.379; 125.379; 125.379; 125.216; 125.208; 125.208; 125.208; 125.161; 125.068; 124.979]
y = [128.067; 127.925; 127.422; 127.418; 127.418; 127.404; 127.404; 127.349; 127.349; 127.236; 126.656; 126.028; 125.898; 125.871; 125.84; 125.693; 125.379; 125.379; 125.379; 125.216; 125.208; 125.208; 125.208; 125.161; 125.068; 124.979]
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